*Heading
** Job name: Job-1 Model name: Model-1
** Generated by: Abaqus/CAE 2022
*Preprint, echo=NO, model=NO, history=NO, contact=NO
**
** PARTS
**
*Part, name=Part-1
*Node
      1,        525.5,         100.,         200.
      2,        525.5,           0.,         200.
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*Element, type=C3D4
   1,  883,  884,  885,  886
   2,  883,  887,  888,  889
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*End Part
**
**
** ASSEMBLY
**
*Assembly, name=Assembly
**
*Instance, name=Part-1-1, part=Part-1
*End Instance
**
*End Assembly
**
** MATERIALS
**
*Material, name=FEA
*Density
 2.338e-9,
*Elastic
39000., 0.2
